*Heading
** Job name: 2024-03-06_WingBox_Demonstrator_15m_V2 Model name: Model-1
** Generated by: Abaqus/CAE 2023
*Preprint, echo=NO, model=NO, history=NO, contact=NO
**
** PARTS
**
*Part, name=WingBox
*Node
      1,       12000.,   289.419159,           0.
      2,       12000.,   289.419159,         600.
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*Element, type=S4R
 1,   1,  25, 821,  58
 2,  25,  26, 822, 821
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*Nset, nset=Set-Section_WingBox, generate
    1,  6092,     1
*Elset, elset=Set-Section_WingBox, generate
    1,  6126,     1
** Section: Section-WingBox
*Shell Section, elset=Set-Section_WingBox, material=Aluminium, section integration=GAUSS
3.5, 3
*End Part
**
**
** ASSEMBLY
**
*Assembly, name=Assembly
**
*Instance, name=WingBox-1, part=WingBox
*End Instance
**
*Node
      1,        -300.,        1250.,         300.
*Node
      2,       15000.,        -700.,        2500.
*Nset, nset=Clamp-Set
 1,
*Nset, nset=Load-Point-Set
 2,
*Nset, nset=p_Set-Clamp, instance=WingBox-1
  21,  22,  23,  24, 607, 608
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*Elset, elset=p_Set-Clamp, instance=WingBox-1
 3667, 3668, 3669, 3670, 3671, 3672
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*Nset, nset=p_Set-Load, instance=WingBox-1
   5,   6,  89,  90,  91,  92,  93,  94,  95,  96,  97,  98,  99, 100
*Elset, elset=p_Set-Load, instance=WingBox-1, generate
 469,  481,    1
*Nset, nset=_PickedSet7, internal
 2,
*Nset, nset=_PickedSet9, internal
 1,
** Constraint: RigidBody-Clamp
*Rigid Body, ref node=_PickedSet9, pin nset=p_Set-Clamp
** Constraint: RigidBody-Load
*Rigid Body, ref node=_PickedSet7, pin nset=p_Set-Load
*End Assembly
**
** MATERIALS
**
*Material, name=Aluminium
*Density
 0.0027,
*Elastic
70000., 0.34
** ----------------------------------------------------------------
**
** STEP: Load-Step
**
*Step, name=Load-Step, nlgeom=NO
*Static
1., 1., 1e-05, 1.
**
** BOUNDARY CONDITIONS
**
** Name: BC-Clamped-End Type: Displacement/Rotation
*Boundary
Clamp-Set, 1, 1
Clamp-Set, 2, 2
Clamp-Set, 3, 3
Clamp-Set, 4, 4
Clamp-Set, 5, 5
Clamp-Set, 6, 6
**
** LOADS
**
** Name: Acceleration_Load   Type: Gravity
*Dload
, GRAV, 19613.2, 0., 0., 1.
**
** OUTPUT REQUESTS
**
*Restart, write, frequency=0
**
** FIELD OUTPUT: F-Output-1
**
*Output, field, variable=PRESELECT
**
** HISTORY OUTPUT: H-Output-1
**
*Output, history, variable=PRESELECT
*End Step
